// SBML level 2 version 1

model ModelB()
  // ModelB

  // Compartments:
  compartment nucleus = 10000;

  // Species:
  substanceOnly species T0 in nucleus = 100;  // substance in MWBUILTINUNIT_molecule
  substanceOnly species T in nucleus = 100;  // substance in MWBUILTINUNIT_molecule
  substanceOnly species x in nucleus = 50;  // substance in MWBUILTINUNIT_molecule
  substanceOnly species Tx in nucleus = 0;  // substance in MWBUILTINUNIT_molecule
  substanceOnly species xTx in nucleus = 0;  // substance in MWBUILTINUNIT_molecule
  substanceOnly species x0 in nucleus = 50;  // substance in MWBUILTINUNIT_molecule
  substanceOnly species N in nucleus = 30;  // substance in MWBUILTINUNIT_molecule
  substanceOnly species TN in nucleus = 0;  // substance in MWBUILTINUNIT_molecule
  substanceOnly species N0 in nucleus = 30;  // substance in MWBUILTINUNIT_molecule
  substanceOnly species P in nucleus = 7;  // substance in MWBUILTINUNIT_molecule
  substanceOnly species TP in nucleus = 0;  // substance in MWBUILTINUNIT_molecule
  substanceOnly species P0 in nucleus = 7;  // substance in MWBUILTINUNIT_molecule
  substanceOnly species xT in nucleus = 0;  // substance in MWBUILTINUNIT_molecule

  // Algebraic rules:
  0 = T0 - T - Tx - xT - xTx - TN - TP;
  0 = x0 - x - Tx - xT - 2*xTx;
  0 = N0 - N - TN;
  0 = P0 - P - TP;

  // Reactions:
  reaction_Tx: T + x -> Tx; reaction_Tx_ks_1*T*x - reaction_Tx_ks_2*Tx;
    reaction_Tx_ks_1 = 0.01 MWDERIVEDUNIT_1__molecule_minute; reaction_Tx_ks_2 = 0.0021 MWDERIVEDUNIT_1__minute;
  reaction_xTx: Tx + x -> xTx; reaction_xTx_ks_1*Tx*x - reaction_xTx_ks_2*xTx;
    reaction_xTx_ks_1 = 0.01 MWDERIVEDUNIT_1__molecule_minute; reaction_xTx_ks_2 = 0.0021 MWDERIVEDUNIT_1__minute;
  reaction_TN: T + N -> TN; kn_1*T*N - kn_2*TN;
    kn_1 = 0.01 MWDERIVEDUNIT_1__molecule_minute; kn_2 = 0.42 MWDERIVEDUNIT_1__minute;
  reaction_TP: T + P -> TP; kp_1*T*P - kp_2*TP;
    kp_1 = 0.01 MWDERIVEDUNIT_1__molecule_minute; kp_2 = 0.42 MWDERIVEDUNIT_1__minute;
  reaction_xT: T + x -> xT; reaction_xT_ks_1*T*x - reaction_xT_ks_2*xT;
    reaction_xT_ks_1 = 0.01 MWDERIVEDUNIT_1__molecule_minute; reaction_xT_ks_2 = 0.0021 MWDERIVEDUNIT_1__minute;

  // Unit definitions:
  unit MWBUILTINUNIT_molecule = 1.660539e-24 mole;
  unit MWDERIVEDUNIT_1__molecule_minute = 1.00369e22 dimensionless / (mole * second); MWDERIVEDUNIT_1__molecule_minute is "1/(molecule*minute)";
  unit MWDERIVEDUNIT_1__minute = 0.01666667 dimensionless / second; MWDERIVEDUNIT_1__minute is "1/minute";
end
